# Recovery of construction and demolition debris, segregated; at mixed CDD processing facility

Dataset: openLCA process, unit process
Category: 56: Administrative and Support and Waste Management and Remediation Services/5621: Waste Collection
Geography: US
Time period: 2016-01-01 to 2016-12-31
Generated by: Innovative Waste Consulting Services, LLC
Owner: US EPA
Reviewer: US EPA
Published in: Niblick et al. 2019
restrictionsDescription: CC0 1.0 Universal
Although the information in this document has been funded by the U.S. EPA, it does not necessarily reflect the views of the Agency and no official endorsement should be inferred.
copyright: false

## General comment
This gate-to-gate process dataset simulates the inputs and outputs necessary for the operation of a mixed construction and demolition debris (CDD) material recovery facility (MRF). The process is an agglomeration of data from a nationwide survey of CDD MRFs conducted by the Construction and Demolition Recycling Association (CDRA) and includes detailed infrastructure and equipment inventories from an in-depth study of 2 large-scale mixed CDD MRFs located in the southeastern US. Sixteen respondents to the CDRA (2015) provided information on mixed CDD MRF throughput, diversion rates, facility size (i.e., acreage), electricity consumption, and fuel consumption.

## Technology
Mixed CDD MRFs typically utilize automated and manual processes to separate a mixed incoming CDD stream into individual material categories and then market the segregated materials to different end users. Some CDD MRFs include additional processing steps (e.g., concrete crushing, woody debris grinding). This dataset is intended to represent the average nationwide CDD MRF employing the average recovery technologies.

## Geography
Equipment inventory information and water consumption data was developed from a detailed inspection of 2 large-scale mixed CDD MRFS in the southeastern US. Additional flows represent average values taken from 16 individual mixed CDD MRFs from across the US.

## Time period
The start and end dates represent the bounds of the time period for which this dataset is intended to be representative.

## Parameters
- RubTirLoadLargeFrac: 0.15414
  Fraction of total processing facility fuel consumed by Diesel Rubber Tire Loaders; 300 < hp <= 600
- RubTirLoadMedDies: 0.000290854; = DieselTot*DieselDens*RubTirLoadMedFrac
  diesel fuel consumed by MOVES Diesel Rubber Tire Loaders; 175 < hp <= 300 (kg diesel/kg material throughput)
- SweepCon: 6.49479e-10; = SweepDies/SweepLife
  total equipment utilization of MOVES Diesel Sweepers/Scrubbers; 50 < hp <= 75 (items/kg material throughput)
- LandOccup: 5.27681e-5; = AreaTot*43560*(mperft^2)/(TPYTot*907.185*OpLife)
  Facility land occupation (m2/kg material throughput)
- ProcessDustWat: 146.5
  water consumption for controlling dust emissions from material processing (L/min)
- WaterTruckFrac: 0.150927
  Fraction of total processing facility fuel consumed by Diesel Terminal Tractors; 175 < hp <= 300
- WatConsTot: 0.000463977; = (ProcessDustWatCons+PvdWatCons+SprnkWatCons)/1000
  Total water consumption (m3/kg material throughput)
- WaterTruckLife: 173882
  total kg diesel consumed over the operating life of MOVES Diesel Terminal Tractors; 175 < hp <= 300 (kg diesel/equipment operating life)
- LitperGal: 3.785
  liters per gallon
- RubTirLoadSmallFrac: 0.0113303
  Fraction of total processing facility fuel consumed by Diesel Rubber Tire Loaders; 50 < hp <= 75
- RubTirLoadLargeCon: 4.11848e-10; = RubTirLoadLargeDies/RubTirLoadLargeLife
  total equipment utilization of MOVES Diesel Rubber Tire Loaders; 300 < hp <= 600 (items/kg material throughput)
- SweepLife: 52521.6
  total kg diesel consumed over the operating life of MOVES Diesel Sweepers/Scrubbers; 50 < hp <= 75 (kg diesel/equipment operating life)
- TruckDist: 20
  Short-haul truck transport distance between material throughput collection and material throughput processing facility (km)
- ExcLargeDies: 0.000267041; = DieselTot*DieselDens*ExcLargeFrac
  diesel fuel consumed by MOVES Diesel Excavators; 175 < hp <= 300 (kg diesel/kg material throughput)
- PvdWatCons: 0.287864; = ((PavedArea*OpDays*OpHours*(minperhr/AppInterval)*WatUse*LitperGal)/(SqFTperSqYd*mperft*mperft))/(TPYdustCon*907.185)
  water consumption for landfill onsite road dust control (liters/kg material throughput)
- OpLife: 20
  Facility operating life (years)
- RubTirLoadSmallLife: 53812.8
  total kg diesel consumed over the operating life of MOVES Diesel Rubber Tire Loaders; 50 < hp <= 75 (kg diesel/equipment operating life)
- SweepDies: 3.41117e-5; = DieselTot*DieselDens*SweepFrac
  diesel fuel consumed by MOVES Diesel Sweepers/Scrubbers; 50 < hp <= 75 (kg diesel/kg material throughput)
- RubTirLoadMedCon: 1.61016e-9; = RubTirLoadMedDies/RubTirLoadMedLife
  total equipment utilization of MOVES Diesel Rubber Tire Loaders; 175 < hp <= 300 (items/kg material throughput)
- SweepFrac: 0.0258414
  Fraction of total processing facility fuel consumed by Diesel Sweepers/Scrubbers; 50 < hp <= 75
- ExcSmallCon: 2.27297e-9; = ExcSmallDies/ExcSmallLife
  total equipment utilization of MOVES Diesel Excavators; 100 < hp <= 175 (items/kg material throughput)
- RubTirLoadVerySmallCon: 5.18849e-10; = RubTirLoadVerySmallDies/RubTirLoadVerySmallLife
  total equipment utilization of MOVES Diesel Rubber Tire Loaders; 40 < hp <= 50 (items/kg material throughput)
- ExcLargeLife: 183228
  total kg diesel consumed over the operating life of MOVES Diesel Excavators; 175 < hp <= 300 (kg diesel/equipment operating life)
- Precip: 34.47
  Annual precipitation (inches/year)
- WoodGrindDies: 5.37265e-5; = DieselTot*DieselDens*WoodGrindFrac
  diesel fuel consumed by MOVES Diesel Other Material Handling Equipment; 1000 < hp <= 1200 (kg diesel/kg material throughput)
- RubTirLoadSmallCon: 2.77935e-10; = RubTirLoadSmallDies/RubTirLoadSmallLife
  total equipment utilization of MOVES Diesel Rubber Tire Loaders; 50 < hp <= 75 (items/kg material throughput)
- SprnkWatCons: 0.120932; = SprnkRate*NoSprnks*OpDays*OpHours*60*LitperGal/(TPYdustCon*907.185)
  water consumption for sprinkler perimeter wall dust control (liters/kg material throughput)
- RubTirLoadVerySmallLife: 21229.6
  total kg diesel consumed over the operating life of MOVES Diesel Rubber Tire Loaders; 40 < hp <= 50 (kg diesel/equipment operating life)
- RubTirLoadSmallDies: 1.49565e-5; = DieselTot*DieselDens*RubTirLoadSmallFrac
  diesel fuel consumed by MOVES Diesel Rubber Tire Loaders; 50 < hp <= 75 (kg diesel/kg material throughput)
- mperft: 0.3048
  meters per foot
- TPYTot: 2.61086e6
  Total tons per year throughput for all facilities being represented in dataset (short tons/year)
- AppInterval: 40
  minutes between water applications
- WatEvp: 0.463977; = WatConsTot*1000
  water evaporation (kg/kg material throughput)
- Area: 10.808
  Facility developed land area (acres)
- OpDays: 260
  Number of operating days per year
- SitePavFrac: 0.612
  Fraction of site that is paved
- PavedArea: 14069
  Total area of site paved surface (m2)
- ExcSmallLife: 108068
  total kg diesel consumed over the operating life of MOVES Diesel Excavators; 100 < hp <= 175 (kg diesel/equipment operating life)
- WaterTruckDies: 0.000199229; = DieselTot*DieselDens*WaterTruckFrac
  diesel fuel consumed by MOVES Diesel Terminal Tractors; 175 < hp <= 300 (kg diesel/kg material throughput)
- WoodGrindLife: 1.47245e6
  total kg diesel consumed over the operating life of MOVES Diesel Other Material Handling Equipment; 1000 < hp <= 1200 (kg diesel/equipment operating life)
- AreaTot: 617.68
  Total acreage for all facilities being represented in dataset
- SurfWat: 0.565494; = Precip*OpLife*SitePavFrac*LandOccup*(mperft)*1000/12
  Annual site discharge to surface water (L/kg material throughput)
- minperhr: 60
  minutes per hour
- TPYdustCon: 365232
  tons per year throughput for the facility which uses water for paved surface (i.e., water truck, brooming/sweeping), process (i.e., sprayers/misters) and perimeter wall (i.e., sprinklers) dust control.
- TPYAvg: 170926
  Facility average annual tonnage throughput (short tons/year)
- RubTirLoadVerySmallDies: 1.10149e-5; = DieselTot*DieselDens*RubTirLoadVerySmallFrac
  diesel fuel consumed by MOVES Diesel Rubber Tire Loaders; 40 < hp <= 50 (kg diesel/kg material throughput)
- ExcSmallFrac: 0.186081
  Fraction of total processing facility fuel consumed by Diesel Excavators; 100 < hp <= 175
- RubTirLoadLargeDies: 0.000203471; = DieselTot*DieselDens*RubTirLoadLargeFrac
  diesel fuel consumed by MOVES Diesel Rubber Tire Loaders; 300 < hp <= 600 (kg diesel/kg material throughput)
- ProcessDustWatCons: 0.0551807; = ProcessDustWat*60*OpHours*OpDays/(TPYdustCon*907.185)
  water consumption for controlling dust emissions from material processing (L/kg material throughput)
- RubTirLoadMedLife: 180636
  total kg diesel consumed over the operating life of MOVES Diesel Rubber Tire Loaders; 175 < hp <= 300 (kg diesel/equipment operating life)
- RubTirLoadVerySmallFrac: 0.00834441
  Fraction of total processing facility fuel consumed by Diesel Rubber Tire Loaders; 40 < hp <= 50
- ExcLargeCon: 1.45742e-9; = ExcLargeDies/ExcLargeLife
  total equipment utilization of MOVES Diesel Excavators; 175 < hp <= 300 (items/kg material throughput)
- TruckTrans: 0.02; = TruckDist/1000
  Total short-haul truck transport for each kg of material throughput (tonne*km)
- ExcSmallDies: 0.000245635; = DieselTot*DieselDens*ExcSmallFrac
  diesel fuel consumed by MOVES Diesel Excavators; 100 < hp <= 175 (kg diesel/kg material throughput)
- SprnkRate: 2.925
  water consumption rate of each sprinkler used for perimeter wall dust control (gpm)
- WoodGrindCon: 3.64878e-11; = WoodGrindDies/WoodGrindLife
  total equipment utilization of MOVES Diesel Other Material Handling Equipment; 1000 < hp <= 1200 (items/kg material throughput)
- WaterTruckCon: 1.14577e-9; = WaterTruckDies/WaterTruckLife
  total equipment utilization of MOVES Diesel Terminal Tractors; 175 < hp <= 300 (items/kg material throughput)
- NoSprnks: 29
  total number of sprinklers for perimeter wall dust control
- SqFTperSqYd: 9
  square feet per square yard
- DieselTot: 0.00156218
  Total diesel consumed by processing facility heavy equipment (L/kg material throughput)
- ExcLargeFrac: 0.202297
  Fraction of total processing facility fuel consumed by Diesel Excavators; 175 < hp <= 300
- WatUse: 0.48
  water application per square yard (gal/yd2)
- RubTirLoadMedFrac: 0.220337
  Fraction of total processing facility fuel consumed by Diesel Rubber Tire Loaders; 175 < hp <= 300
- OpHours: 8
  Number of operating hours per day
- RubTirLoadLargeLife: 494044
  total kg diesel consumed over the operating life of MOVES Diesel Rubber Tire Loaders; 300 < hp <= 600 (kg diesel/equipment operating life)
- DieselDens: 0.845
  Density of diesel fuel (kg/L)
- WoodGrindFrac: 0.0407007
  Fraction of total processing facility fuel consumed by Diesel Other Material Handling Equipment; 1000 < hp <= 1200

## Reference product
- Concrete; demolished; at mixed CDD MRF: 0.32381 kg

## By-products
- Gypsum drywall; demolished; at mixed CDD MRF: 0.00615157 kg
- Carpet or carpet padding; unspecified scrap; at mixed CDD MRF: 0.0023845 kg
- Asphalt shingles; tear-off; at mixed CDD MRF: 0.00896724 kg
- Bricks and masonry; at mixed CDD MRF: 0.0182679 kg
- Green waste; unspecified; at mixed CDD MRF: 0.0714619 kg
- Reclaimed asphalt pavement; at mixed CDD MRF: 0.00579207 kg
- Metal; unspecified scrap; at mixed CDD MRF: 0.0202038 kg
- Plastic; unspecified scrap; at mixed CDD MRF: 0.0034757 kg
- Fines; recovered screened material; at mixed CDD MRF: 0.180696 kg
- Glass; broken; at mixed CDD MRF: 0.00598704 kg
- Paper; unspecified scrap, at mixed CDD MRF: 5.30256e-5 kg
- Wood; unspecified scrap; at mixed CDD MRF: 0.00182824 kg
- Fuel product; unspecified; at mixed CDD MRF: 0.133615 kg
- Top soil; at mixed CDD MRF: 0.00412681 kg
- Cardboard; unspecified scrap; at mixed CDD MRF: 0.0127178 kg

## Inputs from technosphere
- Truck transport, class 8, heavy heavy-duty (HHD), diesel, short-haul, load factor 0.75: 0.02 t*km; = TruckTrans
- Diesel rubber tire loaders; 50 < hp <= 75: 2.77935e-10 Item(s); = RubTirLoadSmallCon; provider Bridge_CDD_to_USEEIO_Diesel_rubbertireloaders_50 < hp <= 75
- Picking line conveyor with apron; 30 hp; electric: 1.18162e-10 Item(s)
- Fuel combustion; diesel sweepers/scrubbers; 50 < hp <= 75: 3.41117e-5 kg; = SweepDies
- Privacy screen; high density polyethylene, UV stabilized; at plant: 3.12622e-8 kg
- Steel product, primary structural, beams and columns, at plant: 2.00078e-5 kg
- Concrete; ready-mix, truck mix; at plant: 0.000446152 kg
- Fuel combustion; diesel other material handling equipment; 1000 < hp <= 1200: 5.37265e-5 kg; = WoodGrindDies
- Fuel combustion; diesel rubber tire loaders; 50 < hp <= 75: 1.49565e-5 kg; = RubTirLoadSmallDies
- Fuel combustion; diesel rubber tire loaders; 175 < hp <= 300: 0.000290854 kg; = RubTirLoadMedDies
- Destoner; 140 hp; 72-inch wide; electric: 1.18162e-10 Item(s)
- Fuel combustion; diesel excavators; 100 < hp <= 175: 0.000245635 kg; = ExcSmallDies
- Equipment support infrastructure and other equipment; unspecified: 2.15591e-5 kg
- Diesel terminal tractors; 175 < hp <= 300: 1.14577e-9 Item(s); = WaterTruckCon; provider Bridge_CDD_to_USEEIO_Diesel_terminaltractors_175 < hp <= 300
- Hot mix asphalt (HMA), at production facility: 5.90679e-5 kg
- Surfaced dried lumber, at planar mill, US SE: 2.13545e-6 kg
- Mixed CDD, at generation [US]: 1 kg
- Fuel combustion; diesel rubber tire loaders; 300 < hp <= 600: 0.000203471 kg; = RubTirLoadLargeDies
- Diesel other material handling equipment; 1000 < hp <= 1200: 3.64878e-11 Item(s); = WoodGrindCon; provider Bridge_CDD_to_USEEIO_Diesel_othermathandequip_1000 < hp <= 1200
- Gypsum wallboard product, regular, 0.5 inch (12.7 mm): 3.43878e-8 m2
- Picking line conveyor; 5 hp; electric: 1.18162e-10, 1.18162e-10 Item(s) (2 entries)
- Fuel combustion; diesel rubber tire loaders; 40 < hp <= 50: 1.10149e-5 kg; = RubTirLoadVerySmallDies
- Shaker screen; 26500 pounds; 47.5 hp; electric: 1.18162e-10 Item(s)
- Diesel rubber tire loaders; 40 < hp <= 50: 5.18849e-10 Item(s); = RubTirLoadVerySmallCon; provider Bridge_CDD_to_USEEIO_Diesel_rubbertireloaders_40 < hp <= 50
- Finger screen; 96000 pounds; 50 hp; electric: 1.18162e-10 Item(s)
- Asphalt shingles; at plant: 5.35065e-8 kg
- Electricity, at industrial user: 0.00307861 kWh; provider Bridge_CDD_to_ElectricityLCI
- Finger screen; 90000 pounds; 50 hp; electric: 1.18162e-10 Item(s)
- Magnet and belt; 12.5 hp; electric: 1.18162e-10 Item(s)
- Trommel; 60 hp; electric: 1.18162e-10 Item(s)
- Picking line conveyor with transfer; 12.5 hp; electric: 1.18162e-10 Item(s)
- Diesel sweepers/scrubbers; 50 < hp <= 75: 6.49479e-10 Item(s); = SweepCon; provider Bridge_CDD_to_USEEIO_Diesel_sweepers/scrubbers_50 < hp <= 75
- Vinyl canvas; at plant: 2.16431e-8 kg
- Diesel rubber tire loaders; 175 < hp <= 300: 1.61016e-9 Item(s); = RubTirLoadMedCon; provider Bridge_CDD_to_USEEIO_Diesel_rubbertireloaders_175 < hp <= 300
- Fuel combustion; diesel excavators; 175 < hp <= 300: 0.000267041 kg; = ExcLargeDies
- Fuel combustion; diesel terminal tractors; 175 < hp <= 300: 0.000199229 kg; = WaterTruckDies
- Vinyl flooring; at plant: 6.43281e-8 kg
- Diesel rubber tire loaders; 300 < hp <= 600: 4.11848e-10 Item(s); = RubTirLoadLargeCon; provider Bridge_CDD_to_USEEIO_Diesel_rubbertireloaders_300 < hp <= 600
- Diesel excavators; 175 < hp <= 300: 1.45742e-9 Item(s); = ExcLargeCon; provider Bridge_CDD_to_USEEIO_Diesel_excavators_175 < hp <= 300
- Diesel excavators; 100 < hp <= 175: 2.27297e-9 Item(s); = ExcSmallCon; provider Bridge_CDD_to_USEEIO_Diesel_excavators_100 < hp <= 175
- Destoner; 25 hp; 48-inch wide; electric: 1.18162e-10 Item(s)

## Inputs from nature
- Water, fresh [resource, water]: 4.63977e-7 kg; = 0.001* (WatConsTot)
- Land use [resource, ground, human-dominated, industrial]: 5.27681e-5 m2*a; = 1.0* (LandOccup)

## Waste to treatment
- Solid waste; to landfill; at drywall processing facility: 0.200461 kg

## Emissions to nature
- Water, fresh [resource, water, fresh water body]: 0.565494 kg; = 1.0* (SurfWat)
- Water [emission, air]: 0.463977 kg; = 1.0* (WatEvp)

## Allocation factors
- causal, Bricks and masonry; at mixed CDD MRF, for Fuel combustion; diesel other material handling equipment; 1000 < hp <= 1200: 0
- causal, Fines; recovered screened material; at mixed CDD MRF, for Finger screen; 90000 pounds; 50 hp; electric: 0
- causal, Carpet or carpet padding; unspecified scrap; at mixed CDD MRF, for Gypsum wallboard product, regular, 0.5 inch (12.7 mm): 0
- causal, Bricks and masonry; at mixed CDD MRF, for Surfaced dried lumber, at planar mill, US SE: 0
- causal, Plastic; unspecified scrap; at mixed CDD MRF, for Fuel combustion; diesel other material handling equipment; 1000 < hp <= 1200: 0
- causal, Green waste; unspecified; at mixed CDD MRF, for Fuel combustion; diesel rubber tire loaders; 50 < hp <= 75: 0
- causal, Fuel product; unspecified; at mixed CDD MRF, for Picking line conveyor; 5 hp; electric: 0
- causal, Metal; unspecified scrap; at mixed CDD MRF, for Diesel rubber tire loaders; 40 < hp <= 50: 0
- causal, Metal; unspecified scrap; at mixed CDD MRF, for Vinyl flooring; at plant: 0
- causal, Fuel product; unspecified; at mixed CDD MRF, for Equipment support infrastructure and other equipment; unspecified: 0
- causal, Bricks and masonry; at mixed CDD MRF, for Steel product, primary structural, beams and columns, at plant: 0
- causal, Glass; broken; at mixed CDD MRF, for Diesel terminal tractors; 175 < hp <= 300: 0
- causal, Cardboard; unspecified scrap; at mixed CDD MRF, for Picking line conveyor with apron; 30 hp; electric: 0
- causal, Concrete; demolished; at mixed CDD MRF, for Fuel combustion; diesel excavators; 175 < hp <= 300: 1
- causal, Top soil; at mixed CDD MRF, for Diesel excavators; 175 < hp <= 300: 0
- causal, Bricks and masonry; at mixed CDD MRF, for Fuel combustion; diesel rubber tire loaders; 175 < hp <= 300: 0
- causal, Top soil; at mixed CDD MRF, for Asphalt shingles; at plant: 0
- causal, Fines; recovered screened material; at mixed CDD MRF, for Diesel rubber tire loaders; 300 < hp <= 600: 0
- causal, Green waste; unspecified; at mixed CDD MRF, for Gypsum wallboard product, regular, 0.5 inch (12.7 mm): 0
- causal, Carpet or carpet padding; unspecified scrap; at mixed CDD MRF, for Picking line conveyor; 5 hp; electric: 0
- causal, Wood; unspecified scrap; at mixed CDD MRF, for Finger screen; 96000 pounds; 50 hp; electric: 0
- causal, Reclaimed asphalt pavement; at mixed CDD MRF, for Solid waste; to landfill; at drywall processing facility: 0
- causal, Concrete; demolished; at mixed CDD MRF, for Diesel rubber tire loaders; 175 < hp <= 300: 0
- causal, Wood; unspecified scrap; at mixed CDD MRF, for Picking line conveyor with apron; 30 hp; electric: 0
- causal, Gypsum drywall; demolished; at mixed CDD MRF, for Fuel combustion; diesel rubber tire loaders; 40 < hp <= 50: 0
- causal, Fuel product; unspecified; at mixed CDD MRF, for Concrete; ready-mix, truck mix; at plant: 0
- causal, Top soil; at mixed CDD MRF, for Magnet and belt; 12.5 hp; electric: 0
- causal, Fines; recovered screened material; at mixed CDD MRF, for Destoner; 140 hp; 72-inch wide; electric: 0
- causal, Bricks and masonry; at mixed CDD MRF, for Diesel sweepers/scrubbers; 50 < hp <= 75: 0
- causal, Reclaimed asphalt pavement; at mixed CDD MRF, for Diesel rubber tire loaders; 175 < hp <= 300: 0
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
## Inventory method
Attributional

## Modelling constants
A primary assumption of this dataset is that all incoming CDD loads arrive at the MRF as mixed material. In actual practice, some loads already represent individual materials and are a product of specific demolition activities, such as road demolition, land clearing, and roofing projects. These loads may not (and commonly do not) receive the same degree of processing as mixed loads. Because the CDRA (2015)-reported data do not provide details on the fraction of loads arriving in mixed vs material-specific loads, this dataset presents all loads as arriving as mixed CDD.

Another primary assumption is that the equipment inventory compiled from a detailed inspection of two large-scale mixed CDD MRFs (IWCS 2015) is reflective of a representative inventory of the average nationwide facility.

This dataset assumes that PM emissions resulting from paved surfaces, processing, and stockpile management are negligible. The extent of wet suppression techniques utilized at the sites inspected by IWCS (2015) suggests a very high degree of dust control.

The dataset user should note that stormwater is commonly impounded onsite in stormwater retention ponds. The dataset presents a flow to surface water as leaving the system boundary for water balance accounting purposes, since values for pond water loss through groundwater infiltration and evaporation are unknown. Stormwater quality data for mixed CDD MRFs was not found at the time this dataset was developed.

## Completeness
The following flow data are missing from this dataset: particulate matter emissions (from equipment processing) and stormwater emissions (i.e., only the volume of stormwater is accounted for), In the absence of additional information, it was assumed that mixed CDD is transported 20 km from the point of generation to the mixed CDD MRF.

## Data selection
test data selection

## Data treatment
A total of 16 respondents to the CDRA (2015) survey provided information on electricity consumption, diesel consumption, land occupation, material throughput, diversion rates, and recovered material composition. These data were used to estimate the inputs/outputs of an average US facility. Each flow was normalized with the facility throughput.

Equipment operation/utilization and materials used in facility construction were estimated for 2 mixed CDD MRFs in southeastern US. Construction materials were estimated by taking onsite dimensional measurement of facility infrastructure. The total amount of each of these materials was then quantified on a mass basis through the use of typical density values for each material type (e.g., concrete, steel). The total tonnage of materials accepted at each of the two facilities was found for years 2013-2015. An average annual tonnage was then calculated using these tonnage amounts. Service lives for the different materials were estimated using values presented in Townsend and Cochran (2010). The total tonnage of each material was then divided by its service life to approximate the quantity of that material necessary each year. These quantities were then divided by the average annual facility throughput to approximate the mass of each construction material needed per mass of throughput.

The equipment manufacturer-listed horse power ratings of each piece of equipment inventoried at the 2 sites visited by IWCS (2015) were used in conjunction with the US EPA (2014) Motor Vehicle Emissions Simulator (MOVES) database to quantify equipment usage according to fuel consumption. The US EPA (2014) MOVES database was also used to estimate equipment utilization, based on the nationwide average total fuel consumption values listed for specific equipment types.

Utilization of electric-powered equipment (e.g., trommels, finger screens), equipment support infrastructure, staircases and platforms, and steel wall partitions was estimated on a mass basis, assuming a 20-year functional/serviceable life. The total mass of each equipment/equipment support infrastructure type inventoried by IWCS (2015) was divided by the average annual throughput reported by the facility from 2013-2015 (i.e., quantities reported to the state's permitting authority).

Land occupation was estimated by dividing the total site areas reported by all 16 respondents and dividing this value by the total throughput reported by the corresponding throughput, assuming a facility lifespan of 20 years. A 12' x 56' standard office trailer was assumed for use for administrative purposes at mixed CDD MRFs.

Mixed CDD MRFs commonly use onsite wells as a source of water for wet dust suppression; therefore, water consumption is typically not tracked at these facilities. Total facility water consumption was estimated from three specific uses: water use by misting cannons, water use by the sprinkler system located at the top of the perimeter wall, and water use for paved surface dust control. Manufacturer specifications of misting cannon equipment present at one of the two sites reviewed by IWCS (2015) and operating time period assumptions were used to estimate water consumption for these devices. The number and style of sprinkler heads, sprinkler nozzle specifications, and the same operating time period assumptions were used to estimate sprinkler water consumption. The total area of paved surfaces, and a water application rate and frequency to achieve nearly 70% dust control (with brooming), as described in US EPA (1985), was used to estimate the total amount of water necessary for paved surface dust suppression.

A water balance was conducted assuming that all water consumption for the purposes of dust control is returned to the atmosphere as water vapor, whereas all water resulting from rainfall onto paved surfaces is collected and managed as stormwater. Average nationwide precipitation was estimated from NOAA (2016). The average paved fraction of the total site area was calculated from Google Earth aerial imagery for four CDRA (2015) respondent sites. This fraction was multiplied by the land occupation value and the average nationwide precipitation. Due to an absence of information, specific emissions associated with stormwater discharge to surface water from these facilities are not included in this dataset. Therefore, the surface water emissions flow is only considered partially accounted for in this dataset.

Several of the construction/equipment manufacturing material input flows are approximated through the use of surrogates due to flow availability in the existing US LCI database. Steel consumption uses "steel, billets, at plant" to approximate the environmental burdens associated with structural steel production. "Surfaced dried lumber, at planar mill, US SE" was used to represent all onsite dimensional lumber use (e.g., fence posts and slats, 2"x4"s), UV-stabilized high density polyethylene (HDPE) fence privacy screen was approximated through the use of "Polyethylene, high density, resin, at plant". Vinyl flooring tiles and vinyl canvas (used as a weather covering for an outdoor work area) were simulated through the use of "polyvinyl chloride, resin, at plant" as a proxy.

## Data collection
Data taken from CDRA (2015) represents a 2014 nationwide survey of construction and demolition debris recycling (i.e., processing) facilities. Detailed equipment inventories, construction material inventory, and water consumption estimates were compiled from site visits to confidential, operating mixed CDD MRFs in the southeastern US. Additional publication dates for the sources used in the development of this dataset range from 1985 to 2016. Specific data collection timeframes associated with each source were not compiled, however, data collection likely was conducted starting a few years prior to and up until the source publication date.

## Sampling procedure
Two primary data collection efforts were used in the development of this dataset. The first of these was a 2014 nationwide survey of CDD MRFs as discussed in CDRA (2015). Facilities were asked to provide 2013 information on fuel consumption, electricity consumption, facility land area, and data on the quality and quantity of the incoming and outgoing CDD streams. This information was used as the basis for the development of the energy demand, land occupation, surface water generation and outgoing material composition presented in the dataset.
The other data collection effort included a site visit to two large-scale (i.e., the two largest CDRA (2015) respondent) facilities in southeastern US. The purpose of these visits was to estimate the quantity of materials utilized in facility construction and equipment manufacturing. Extensive measurements were taken of facility buildings, equipment and infrastructure and individual material were quantified by mass.

## Review details
This dataset has been internally reviewed

## Intended application
This process may be used in any LCA, noting the limitations of the dataset.

## Project
This dataset was prepared by Innovative Waste Consulting Services, LLC under subcontract to the CSC Government Solutions, LLC for the US EPA, Office of Research and Development, Cincinnati, OH under prime contract number EP-C-15-012.

## Sources
- NOAA 2016
- Rain Bird 2016
- US EPA 1998
- US EPA 1985
- IWCS 2015
- Randall et al. 2016
- CDRA 2015
- US EPA 2014b
- Cochran and Townsend 2010
